*********************************************************************
** Abaqus/fromNastran 6.13-1
**
** reading bulk data from: D:\HIAD\August2014\Iter5\3.7m_NoTriTor_15psi.bdf
**  creating Abaqus input: D:\HIAD\August2014\Iter5\3.7m_NoTriTor_15psi.inp
** writing diagnostics to: D:\HIAD\August2014\Iter5\3.7m_NoTriTor_15psi.log
**
**  environment variables: fromnastran_wtmass_fixup <not present>
**                       : fromnastran_distribution <not present>
**                       : fromnastran_pbar_zero_reset <not present>
**                       : fromnastran_loadcases <not present>
**                       : fromnastran_surface_based_coupling <not present>
**                       : fromnastran_cquad4 <not present>
**                       : fromnastran_chexa <not present>
**                       : fromnastran_ctetra <not present>
**                       : fromnastran_cbar <not present>
**                       : fromnastran_beam_offset_coupling <not present>
**                       : fromnastran_beam_orientation_vector <not present>
**                       : fromnastran_shell_general_section <not present>
**                       : fromnastran_eigensolver <not present>
**                       : fromnastran_plotel <not present>
**                       : fromnastran_cdh_weld <not present>
**                       : fromnastran_spoint_dof <not present>
**
** command line arguments: wtmass_fixup <not present>
**                       : distribution <not present>
**                       : pbar_zero_reset <not present, using default=1e-20>
**                       : loadcases <not present>
**                       : surface_based_coupling <not present>
**                       : cquad4 <not present>
**                       : chexa <not present>
**                       : ctetra <not present>
**                       : cbar <not present>
**                       : beam_offset_coupling <not present>
**                       : beam_orientation_vector <not present>
**                       : shell_general_section <not present>
**                       : plotel <not present>
**                       : cdh_weld <not present>
**                       : eigensolver <not present>
**                       : spoint_dof <not present, using default=9>
**
** --------------------------------
** Nastran Case Control entities processed:
**      keyword   number
** ------------   ------
**   BEGIN BULK        1
** DISPLACEMENT        2
**         LOAD        2
**          SPC        2
**    SPCFORCES        2
**      SUBCASE        2
**     SUBTITLE        2
**        TITLE        1
** --------------------------------
** Nastran Case Control entities not processed:
**      keyword   number
** ------------   ------
**         ECHO        1
**       NLPARM        2
**       STRESS        2
** --------------------------------
** Nastran Bulk Data processed:
**      keyword   number
** ------------   ------
**        CBEAM      334
**       CORD2C        2
**       CQUAD4    10354
**       CTRIA3       76
**      ENDDATA        1
**         GRID    10359
**         LOAD        2
**         MAT1        5
**         MAT8        1
**        PARAM        5
**       PLOAD4      197
**       PSHELL       13
**         SPC1       40
**       SPCADD        1
**       PBEAML        1
** --------------------------------
** Nastran Bulk Data not processed:
**      keyword   number
** ------------   ------
**        MATS1        2
**       NLPARM        2
**      TABLES1        2
**
** environment_variable / command_line_argument summary:
** PARAM,WTMASS will be used to adjust structural mass/density
** *DISTRIBUTION will be used for shell offsets, orientations, and thicknesses
**  shell elements will be grouped by PSHELL ID
** Zero PBAR/PBEAM cross sectional parameters will be reset to 1e-20
** Rigid links will be modeled using non-surface-based constraints
** Beam orientations will use a third node on the element connectivity
** Beam offsets will be modeled using rigid couplings and extra nodes
** PSHELL/PCOMP will default to *SHELL SECTION
** PLOTELs will not be translated
** "CDH welds" (isolated CHEXAs with 8 RBE3s) will not be translated to
**  rigid fasteners
** CWELDs will be translated to compliant fasteners
** CQUAD4 elements will be translated to S4R
** SPOINT DOF 0 will be reset to 9 in DMIG, MPC, CELAS2, and CMASS2 data
** found PARAM WTMASS .00259
****************************************
** Found mass multiplier not equal to 1:
** PARAM, WTMASS, 0.00259
** Nastran mass and density are inconsistent with other units.
** Abaqus data for density, mass, and rotary inertia
** will be multiplied by this factor.
****************************************
**
** ---------------------------------------------------
** ---- *HEADING--------------------------------------
** ---------------------------------------------------
**
*HEADING
TITLE = MSC.Nastran job created on 25-Jun-14 at 11:03:52
**
**
***Added
*ORIENTATION, NAME=coord_0deg, SYSTEM=RECTANGULAR, DEFINITION=NODES
    11766, 11765, 2678
*ORIENTATION, NAME=coord_chevron, SYSTEM=RECTANGULAR, DEFINITION=NODES
    11972, 11970, 2731
*ORIENTATION, NAME=coord_15deg, SYSTEM=RECTANGULAR, DEFINITION=NODES
    11238, 11239, 2920
***
** following nodes are in a local coordinate system
** defined using CORD2C with CID = 1
**
**
** following nodes are in a local coordinate system
** defined using CORD2C with CID = 1
**
*SYSTEM
0., 0., 0., 1., 0., 0.
0., 1., 0.
**
*NODE, SYSTEM=C
1, 11.5251, 0., 4.6923
2, 10.4698, 0., 4.92334
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**
** ---------------------------------------------------
** ---- *TRANSFORM -----------------------------------
** ---------------------------------------------------
**
** following nodes have displacement coordinate systems
** defined using CORD2C with CID = 1
**
*TRANSFORM, TYPE=C, NSET=NS_TR_CID_1
0., 0., 0., 0., 0., 1.
**
*NSET, NSET=NS_TR_CID_1
1, 2, 3, 4, 5,
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**
** following nodes have displacement coordinate systems
** defined using CORD2C with CID = 2
**
*TRANSFORM, TYPE=C, NSET=NS_TR_CID_2
11.7899, 1.55217, 9.37826, 11.7899, -13.5926, 9.37826
**
*NSET, NSET=NS_TR_CID_2
173, 2611, 2619, 2625, 10516,
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**
** ---------------------------------------------------
** ---- *MATERIAL ------------------------------------
** ---------------------------------------------------
** PARAM, WTMASS, 0.00259 has been used to
** modify DENSITY for all materials
**
** material data from MAT1 with MID = 3
**
*MATERIAL, NAME=MAT_MID_3
*ELASTIC
1.7e+06, 0.1
*DENSITY
5.439e-05,
**
** material data from MAT1 with MID = 2
**
** This MAT1 had inconsistent E, G, and NU:
** E = 2.4e+06  G = 909091.  NU = 0.1
** G differs from E/(2*(1+NU)) by 20. percent
**
*MATERIAL, NAME=MAT_MID_2
*ELASTIC
2.4e+06, 0.1
*DENSITY
0.00011914,
**
** material data from MAT1 with MID = 5
**
*MATERIAL, NAME=MAT_MID_5
*ELASTIC
2.2e+06, 0.1
*DENSITY
5.439e-05,
**
** material data from MAT1 with MID = 6
**
*MATERIAL, NAME=MAT_MID_6
*ELASTIC
2.2e+06, 0.1
*DENSITY
5.439e-05,
**
** material data from MAT1 with MID = 4
**
*MATERIAL, NAME=MAT_MID_4
*ELASTIC
2.2e+06, 0.1
*DENSITY
5.439e-05,
**
** material data from MAT8 with MID = 1
**
*MATERIAL, NAME=MAT_MID_1
*ELASTIC, TYPE=LAMINA
** E1, E2, nu12, G12, G13, G23
251600., 5368., 6.259, 204000., 1e+07, 1e+07
*DENSITY
0.00011137,
**
***SECTION CONTROLS, NAME=REDUCED_INTEGRATION_FROMNASTRAN
**
** ---------------------------------------------------
** ---- BEAM elements --------------------------------
** ---------------------------------------------------
** PARAM, WTMASS, 0.00259 has been used to
** modify DENSITY on the *BEAM GENERAL SECTION keyword
**
** nodes created for defining beam orientations
**
*SYSTEM
*NODE
   20001,   9.4399776,  0.99999654,    14.40238
   20002,   9.4089127,   1.2364001,    14.40238
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**
** following elements refer to a PBEAML (TYPE=ROD) entry with PID = 2 and MID = 2
***BEAM SECTION, SECTION=CIRC, ELSET=ES_PID_BEAM_2, MATERIAL=MAT_MID_2
** radius
**0.165,
**
** Axial Cords, E = 2.0e+06 psi
*BEAM GENERAL SECTION, DENSITY=0.00011914, SECTION=NONLINEAR GENERAL, ELSET=ES_PID_BEAM_2
0.08553, 5.8214E-04, 0.0, 5.8214E-04, 1.1643E-03
*SECTION POINTS
    0.,0.
***
** Zylon Cord AS9396
*AXIAL, ELASTIC
-300., -1.0
0.0, 0.000000
15.1, 0.000259
96.1, 0.001532
118.2, 0.001851
208.6, 0.003066
239.2, 0.003450
337.9, 0.004616
378.6, 0.005070
478.8, 0.006132
528.2, 0.006632
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5109.7, 0.036821
*M1, LINEAR
1.0
*M2, LINEAR
1.0
*TORQUE, LINEAR
1.0
**
*ELEMENT, TYPE=B31, ELSET=ES_PID_BEAM_2
12076,   2627, 4020, 20001
12077,   4020, 2628, 20002
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**
** elset ALL_B31_BARL contains 334 elements in 1 elsets
*ELSET, ELSET=ALL_B31_BARL
ES_PID_BEAM_2,
**
** ---------------------------------------------------
** --- SHELL elements (with directional properties) --
** ---------------------------------------------------
**
** this SHELL SECTION comes from a PSHELL entry with PID = 1
**
*SHELL SECTION, ELSET=PSHELL_DIST_1,
 MATERIAL=MAT_MID_1,
 ORIENTATION=SHELL_STAR_ORIENTATION_DIST
**CONTROLS=REDUCED_INTEGRATION_FROMNASTRAN,
0.02,
**
*ELEMENT, TYPE=S3, ELSET=PSHELL_DIST_1
9831, 3162, 3887, 182
9833, 3941, 202, 3887
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**
*ELEMENT, TYPE=S4, ELSET=PSHELL_DIST_1
1, 3, 3146, 3148, 3147
2, 3146, 182, 3149, 3148
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**
** this SHELL SECTION comes from a PSHELL entry with PID = 4
**
*SHELL SECTION, ELSET=PSHELL_DIST_4,
 MATERIAL=MAT_MID_1,
 ORIENTATION=SHELL_STAR_ORIENTATION_DIST
**CONTROLS=REDUCED_INTEGRATION_FROMNASTRAN,
0.04,
**
*ELEMENT, TYPE=S3, ELSET=PSHELL_DIST_4
10076, 4532, 4533, 397
10081, 4522, 385, 4533
10084, 377, 4502, 4501
10136, 1831, 7193, 7192
**
*ELEMENT, TYPE=S4, ELSET=PSHELL_DIST_4
65, 38, 3163, 3211, 3210
66, 3163, 2067, 3212, 3211
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**
** this SHELL SECTION comes from a PSHELL entry with PID = 6
**
*SHELL SECTION, ELSET=PSHELL_DIST_6,
 MATERIAL=MAT_MID_1,
 ORIENTATION=SHELL_STAR_ORIENTATION_DIST,
 OFFSET=SHELL_OFFSET_DIST
**CONTROLS=REDUCED_INTEGRATION_FROMNASTRAN,
0.053,
**
*ELEMENT, TYPE=S4, ELSET=PSHELL_DIST_6
7794, 1924, 7191, 9420, 9312
7795, 7191, 1923, 9421, 9420
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**
** elset ALL_SHELL_ANISO contains 8696 elements in 3 elsets
*ELSET, ELSET=ALL_SHELL_ANISO
PSHELL_DIST_1,
PSHELL_DIST_4,
PSHELL_DIST_6,
**
** -----------------------------------------------------------------------
** --- SHELL elements (isotropic, non-directional, grouped by MATERIAL ID)
** -----------------------------------------------------------------------
**
** this SHELL SECTION comes from PSHELL entries with MID = 3
**
*SHELL SECTION, ELSET=PSHELL_MID_3,
 MATERIAL=MAT_MID_3,
 SHELL THICKNESS=SHELL_THICKNESS_DIST,
ORIENTATION=coord_0deg,
 OFFSET=SHELL_OFFSET_DIST
**CONTROLS=REDUCED_INTEGRATION_FROMNASTRAN,
***added
***
0.0285,
**
*ELEMENT, TYPE=S4, ELSET=PSHELL_MID_3
11666, 2682, 11719, 11721, 11720
11667, 11719, 2681, 11722, 11721
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**
** this SHELL SECTION comes from PSHELL entries with MID = 4
**
*SHELL SECTION, ELSET=PSHELL_MID_4,
 MATERIAL=MAT_MID_4,
 SHELL THICKNESS=SHELL_THICKNESS_DIST,
 ORIENTATION=coord_chevron,
 OFFSET=SHELL_OFFSET_DIST
**CONTROLS=REDUCED_INTEGRATION_FROMNASTRAN,
***added
***
0.0165,
**
*ELEMENT, TYPE=S3, ELSET=PSHELL_MID_4
**
11791, 11795, 11830, 2662
11794, 2659, 11826, 11799
11816, 11831, 11849, 11850
11819, 2810, 11839, 11848
**
*ELEMENT, TYPE=S4, ELSET=PSHELL_MID_4
11750, 2661, 11792, 11793, 11789
11751, 11792, 2656, 11794, 11793
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**
** this SHELL SECTION comes from PSHELL entries with MID = 5
**
*SHELL SECTION, ELSET=PSHELL_MID_5,
 MATERIAL=MAT_MID_5,
 SHELL THICKNESS=SHELL_THICKNESS_DIST,
 ORIENTATION=coord_0deg,
 OFFSET=SHELL_OFFSET_DIST
**CONTROLS=REDUCED_INTEGRATION_FROMNASTRAN,
***Added
***
0.0495,
**
*ELEMENT, TYPE=S4, ELSET=PSHELL_MID_5
10726, 38, 3164, 3165, 3163
10727, 3164, 4, 3167, 3165
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**
** this SHELL SECTION comes from PSHELL entries with MID = 6
**
*SHELL SECTION, ELSET=PSHELL_MID_6,
 MATERIAL=MAT_MID_6,
 SHELL THICKNESS=SHELL_THICKNESS_DIST,
 ORIENTATION=coord_15deg,
 OFFSET=SHELL_OFFSET_DIST
**CONTROLS=REDUCED_INTEGRATION_FROMNASTRAN,
***Added
***
0.0495,
**
*ELEMENT, TYPE=S4, ELSET=PSHELL_MID_6
10746, 2605, 3201, 3202, 3200
10747, 3201, 2614, 3199, 3202
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**
** ---------------------------------------------------------------------
** --- SHELL elements (isotropic, non-directional, grouped by PSHELL ID)
** ---------------------------------------------------------------------
**
** this SHELL SECTION comes from PSHELL entries with PID = 13
**
*SHELL SECTION, ELSET=PSHELL_13,
 MATERIAL=MAT_MID_5
**CONTROLS=REDUCED_INTEGRATION_FROMNASTRAN,
0.033,
**
*ELEMENT, TYPE=S4, ELSET=PSHELL_13
10850, 79, 3405, 3407, 3406
10851, 3405, 2518, 3408, 3407
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**
** this SHELL SECTION comes from PSHELL entries with PID = 14
**
*SHELL SECTION, ELSET=PSHELL_14,
 MATERIAL=MAT_MID_6
**CONTROLS=REDUCED_INTEGRATION_FROMNASTRAN,
0.033,
**
*ELEMENT, TYPE=S4, ELSET=PSHELL_14
11134, 2432, 5297, 5299, 5298
11135, 5297, 655, 5301, 5299
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**
** elset ALL_SHELL_ISO contains 1734 elements in 6 elsets
*ELSET, ELSET=ALL_SHELL_ISO
PSHELL_MID_3,
PSHELL_MID_4,
PSHELL_MID_5,
PSHELL_MID_6,
PSHELL_13,
PSHELL_14,
**
** ---------------------------------------------------
** --- DISTRIBUTIONs for shell element OFFSETs -------
** ---------------------------------------------------
**
*DISTRIBUTION TABLE, NAME=SHELL_OFFSET_DIST_TABLE
RATIO,
**
*DISTRIBUTION, LOCATION=ELEMENT,
 NAME=SHELL_OFFSET_DIST,
 TABLE=SHELL_OFFSET_DIST_TABLE
 , 0.
**
** TRIA3 elements with nonzero offsets
11791, 2.10606
11794, 2.10606
11816, 2.10606
11819, 2.10606
**
** QUAD4 elements with nonzero offsets
11666, 0.640351
11667, 0.640351
11668, 0.640351
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12501, -1.10606
**
** ---------------------------------------------------
** --- DISTRIBUTIONs for shell element ORIENTATIONs --
** ---------------------------------------------------
**
*ORIENTATION, NAME=SHELL_STAR_ORIENTATION_DIST
SHELL_ORIENTATION_DIST,
3, 0.
**
*DISTRIBUTION TABLE, NAME=SHELL_ORIENTATION_DIST_TABLE
 COORD3D, COORD3D
**
*DISTRIBUTION, LOCATION=ELEMENT,
 NAME=SHELL_ORIENTATION_DIST,
 TABLE=SHELL_ORIENTATION_DIST_TABLE
 ,  1., 0., 0.,  0., 1., 0.
**
** QUAD4 elements with a blank in the THETA/MCID field
7794,  -0.124721, 0.992192, 0.,  0.101573, 0.012768, -0.994746
7795,  -0.124732, 0.99219, 0.,  0.0969582, 0.012189, -0.995214
7796,  -0.122313, 0.992486, -0.00342051,  0.00230407, -0.00316244, -0.999992
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7869,  -0.899302, -0.205353, -0.386117,  0.207516, -0.977548, 0.0365758
**
** TRIA3 elements with coordinate system MCID in the THETA/MCID field
9831,  0.979894, 0.0858121, 0.18012,  -0.0872632, 0.996185, 0.000133178
9833,  0.952205, 0.109057, 0.285329,  -0.112834, 0.993609, -0.003221
9834,  0.866533, 0.136232, -0.480168,  -0.154464, 0.987997, 0.00155958
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10136,  0.3389, 0.0633173, -0.938689,  0.143938, -0.989476, -0.0147762
**
** QUAD4 elements with coordinate system MCID in the THETA/MCID field
1,  0.997325, 0.0201245, 0.0702662,  -0.0202707, 0.999794, 0.00136773
2,  0.995701, 0.0607681, 0.0699006,  -0.0608133, 0.998148, -0.00148339
3,  0.998746, 0.0211279, -0.0453779,  -0.0212045, 0.999774, -0.00120781
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10080,  0.336744, 0.0331769, -0.941012,  -0.126723, 0.991884, -0.0103775
**
** ---------------------------------------------------
** --- DISTRIBUTIONs for shell element thicknesses ---
** ---------------------------------------------------
**
*DISTRIBUTION TABLE, NAME=SHELL_THICKNESS_DIST_TABLE
LENGTH,
**
*DISTRIBUTION, LOCATION=ELEMENT,
 NAME=SHELL_THICKNESS_DIST,
 TABLE=SHELL_THICKNESS_DIST_TABLE
 , 1.
**
** TRIA3 element thicknesses
11791, 0.0165
11794, 0.0165
11816, 0.0165
11819, 0.0165
**
** QUAD4 element thicknesses
11666, 0.0285
11667, 0.0285
11668, 0.0285
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12501, 0.0165
**
** CHEV_TOROID_T3
**
*SURFACE, TYPE=ELEMENT, NAME=M_CHEV_TOROID_T3
     271, SNEG
     290, SNEG
     292, SNEG
     302, SNEG
     304, SNEG
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   10087, SNEG
*SURFACE, TYPE=ELEMENT, NAME=S_CHEV_TOROID_T3
   11771, SPOS
   11773, SPOS
   11774, SPOS
   11776, SPOS
   11795, SPOS
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   11819, SPOS
**
*CONTACT PAIR, INTERACTION=CHEV_TOROID_T3
S_CHEV_TOROID_T3, M_CHEV_TOROID_T3
*SURFACE INTERACTION, NAME=CHEV_TOROID_T3
*FRICTION
0.2,
**
** CHEV_TOROID_T4
**
*SURFACE, TYPE=ELEMENT, NAME=M_CHEV_TOROID_T4
    8002, SNEG
    8003, SNEG
    8004, SNEG
    8005, SNEG
    8006, SNEG
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    8963, SNEG
*SURFACE, TYPE=ELEMENT, NAME=S_CHEV_TOROID_T4
   11996, SPOS
   11997, SPOS
   12000, SPOS
   12001, SPOS
   12052, SPOS
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   12074, SPOS
**
*CONTACT PAIR, INTERACTION=CHEV_TOROID_T4
S_CHEV_TOROID_T4, M_CHEV_TOROID_T4
*SURFACE INTERACTION, NAME=CHEV_TOROID_T4
*FRICTION
0.2,
**
** CHEV_TOROID_T5
**
*SURFACE, TYPE=ELEMENT, NAME=M_CHEV_TOROID_T5
    7950, SNEG
    7951, SNEG
    7952, SNEG
    7953, SNEG
    7954, SNEG
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    8676, SNEG
*SURFACE, TYPE=ELEMENT, NAME=S_CHEV_TOROID_T5
   11973, SPOS
   11975, SPOS
   11977, SPOS
   11979, SPOS
   11980, SPOS
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   12051, SPOS
**
*CONTACT PAIR, INTERACTION=CHEV_TOROID_T5
S_CHEV_TOROID_T5, M_CHEV_TOROID_T5
*SURFACE INTERACTION, NAME=CHEV_TOROID_T5
*FRICTION
0.2,
**
** CHEV_TOROID_T6
**
*SURFACE, TYPE=ELEMENT, NAME=M_CHEV_TOROID_T6
    7862, SNEG
    7863, SNEG
    7864, SNEG
    7865, SNEG
    7866, SNEG
    7867, SNEG
    7868, SNEG
    7869, SNEG
    7930, SNEG
    7931, SNEG
    7932, SNEG
    7933, SNEG
    7934, SNEG
    7935, SNEG
    7936, SNEG
    7937, SNEG
    8186, SNEG
    8187, SNEG
    8190, SNEG
    8191, SNEG
*SURFACE, TYPE=ELEMENT, NAME=S_CHEV_TOROID_T6
   11908, SPOS
   11909, SPOS
   11910, SPOS
   11911, SPOS
   11912, SPOS
   11913, SPOS
   11914, SPOS
   11915, SPOS
   11916, SPOS
   11917, SPOS
   11918, SPOS
   11919, SPOS
   11920, SPOS
   11921, SPOS
   11922, SPOS
   11923, SPOS
   11924, SPOS
   11926, SPOS
   11928, SPOS
   11930, SPOS
**
*CONTACT PAIR, INTERACTION=CHEV_TOROID_T6
S_CHEV_TOROID_T6, M_CHEV_TOROID_T6
*SURFACE INTERACTION, NAME=CHEV_TOROID_T6
*FRICTION
0.2,
**
** CHEV_TOROID_T6_Tied
**
*SURFACE, TYPE=ELEMENT, NAME=M_CHEV_TOROID_T6_TIED
    7794, SNEG
    7795, SNEG
    7796, SNEG
    7797, SNEG
    7798, SNEG
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    7841, SNEG
*SURFACE, TYPE=ELEMENT, NAME=S_CHEV_TOROID_T6_TIED
   11862, SPOS
   11863, SPOS
   11866, SPOS
   11867, SPOS
   11868, SPOS
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   11907, SPOS
**
*TIE, NAME=CHEV_TOROID_T6_TIED, POSITION TOLERANCE=0.02
S_CHEV_TOROID_T6_TIED, M_CHEV_TOROID_T6_TIED
**
** RADIAL_LOOP_T1
**
*SURFACE, TYPE=ELEMENT, NAME=M_RADIAL_LOOP_T1
   10710, SPOS
   10711, SPOS
   10712, SPOS
   10713, SPOS
   10714, SPOS
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   11665, SPOS
*SURFACE, TYPE=ELEMENT, NAME=S_RADIAL_LOOP_T1
   11666, SPOS
   11667, SPOS
   11668, SPOS
   11669, SPOS
   11678, SPOS
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   11709, SPOS
**
*CONTACT PAIR, INTERACTION=RADIAL_LOOP_T1
S_RADIAL_LOOP_T1, M_RADIAL_LOOP_T1
*SURFACE INTERACTION, NAME=RADIAL_LOOP_T1
*FRICTION
0.2,
**
** RADIAL_LOOP_T2
**
*SURFACE, TYPE=ELEMENT, NAME=M_RADIAL_LOOP_T2
   10692, SPOS
   10693, SPOS
   10694, SPOS
   10695, SPOS
   10696, SPOS
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   11441, SPOS
*SURFACE, TYPE=ELEMENT, NAME=S_RADIAL_LOOP_T2
   11720, SPOS
   11721, SPOS
   11722, SPOS
   11723, SPOS
   11724, SPOS
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   11749, SPOS
**
*CONTACT PAIR, INTERACTION=RADIAL_LOOP_T2
S_RADIAL_LOOP_T2, M_RADIAL_LOOP_T2
*SURFACE INTERACTION, NAME=RADIAL_LOOP_T2
*FRICTION
0.2,
**
** STRAP_TOROID1a_AFT
**
*SURFACE, TYPE=ELEMENT, NAME=M_STRAP_TOROID1A_AFT
      97, SNEG
      98, SNEG
      99, SNEG
     100, SNEG
     101, SNEG
     102, SNEG
     103, SNEG
     104, SNEG
    9410, SNEG
    9411, SNEG
*SURFACE, TYPE=ELEMENT, NAME=S_STRAP_TOROID1A_AFT
   10298, SPOS
   10300, SPOS
   11411, SPOS
   11413, SPOS
   11414, SPOS
   11415, SPOS
   11416, SPOS
   11417, SPOS
**
*CONTACT PAIR, INTERACTION=STRAP_TOROID1A_AFT
S_STRAP_TOROID1A_AFT, M_STRAP_TOROID1A_AFT
*SURFACE INTERACTION, NAME=STRAP_TOROID1A_AFT
*FRICTION
0.2,
**
** STRAP_TOROID1a_FWD
**
*SURFACE, TYPE=ELEMENT, NAME=M_STRAP_TOROID1A_FWD
       1, SNEG
       2, SNEG
      13, SNEG
      14, SNEG
      15, SNEG
      16, SNEG
      37, SNEG
      38, SNEG
      39, SNEG
      40, SNEG
*SURFACE, TYPE=ELEMENT, NAME=S_STRAP_TOROID1A_FWD
   10719, SPOS
   10721, SPOS
   11418, SPOS
   11419, SPOS
   11420, SPOS
   11421, SPOS
   11422, SPOS
   11424, SPOS
**
*CONTACT PAIR, INTERACTION=STRAP_TOROID1A_FWD
S_STRAP_TOROID1A_FWD, M_STRAP_TOROID1A_FWD
*SURFACE INTERACTION, NAME=STRAP_TOROID1A_FWD
*FRICTION
0.2,
**
** STRAP_TOROID1b_AFT
**
*SURFACE, TYPE=ELEMENT, NAME=M_STRAP_TOROID1B_AFT
     868, SNEG
     869, SNEG
     870, SNEG
     871, SNEG
     892, SNEG
     893, SNEG
     894, SNEG
     895, SNEG
     900, SNEG
     901, SNEG
     902, SNEG
     903, SNEG
*SURFACE, TYPE=ELEMENT, NAME=S_STRAP_TOROID1B_AFT
   10450, SPOS
   10451, SPOS
   10452, SPOS
   10453, SPOS
   11402, SPOS
   11404, SPOS
   11406, SPOS
   11407, SPOS
   11408, SPOS
   11409, SPOS
**
*CONTACT PAIR, INTERACTION=STRAP_TOROID1B_AFT
S_STRAP_TOROID1B_AFT, M_STRAP_TOROID1B_AFT
*SURFACE INTERACTION, NAME=STRAP_TOROID1B_AFT
*FRICTION
0.2,
**
** STRAP_TOROID2a_AFT
**
*SURFACE, TYPE=ELEMENT, NAME=M_STRAP_TOROID2A_AFT
     125, SNEG
     126, SNEG
     127, SNEG
     128, SNEG
     129, SNEG
     130, SNEG
     131, SNEG
     132, SNEG
     150, SNEG
     152, SNEG
*SURFACE, TYPE=ELEMENT, NAME=S_STRAP_TOROID2A_AFT
   10306, SPOS
   10307, SPOS
   11426, SPOS
   11427, SPOS
   11428, SPOS
   11429, SPOS
   11432, SPOS
   11433, SPOS
**
*CONTACT PAIR, INTERACTION=STRAP_TOROID2A_AFT
S_STRAP_TOROID2A_AFT, M_STRAP_TOROID2A_AFT
*SURFACE INTERACTION, NAME=STRAP_TOROID2A_AFT
*FRICTION
0.2,
**
** STRAP_TOROID2a_FWD
**
*SURFACE, TYPE=ELEMENT, NAME=M_STRAP_TOROID2A_FWD
     173, SNEG
     175, SNEG
     193, SNEG
     194, SNEG
     195, SNEG
     196, SNEG
     197, SNEG
     198, SNEG
     199, SNEG
     200, SNEG
*SURFACE, TYPE=ELEMENT, NAME=S_STRAP_TOROID2A_FWD
   10708, SPOS
   10709, SPOS
   11434, SPOS
   11435, SPOS
   11438, SPOS
   11439, SPOS
   11440, SPOS
   11441, SPOS
**
*CONTACT PAIR, INTERACTION=STRAP_TOROID2A_FWD
S_STRAP_TOROID2A_FWD, M_STRAP_TOROID2A_FWD
*SURFACE INTERACTION, NAME=STRAP_TOROID2A_FWD
*FRICTION
0.2,
**
** STRAP_TOROID2b_AFT
**
*SURFACE, TYPE=ELEMENT, NAME=M_STRAP_TOROID2B_AFT
    7335, SNEG
    7336, SNEG
    7337, SNEG
    7338, SNEG
    7479, SNEG
    7481, SNEG
    9719, SNEG
    9720, SNEG
    9721, SNEG
    9722, SNEG
*SURFACE, TYPE=ELEMENT, NAME=S_STRAP_TOROID2B_AFT
   11651, SPOS
   11653, SPOS
   11656, SPOS
   11657, SPOS
   11658, SPOS
   11659, SPOS
   11660, SPOS
   11661, SPOS
**
*CONTACT PAIR, INTERACTION=STRAP_TOROID2B_AFT
S_STRAP_TOROID2B_AFT, M_STRAP_TOROID2B_AFT
*SURFACE INTERACTION, NAME=STRAP_TOROID2B_AFT
*FRICTION
0.2,
**
** STRAP_TOROID2b_FWD
**
*SURFACE, TYPE=ELEMENT, NAME=M_STRAP_TOROID2B_FWD
    1467, SNEG
    1468, SNEG
    1469, SNEG
    1470, SNEG
    1487, SNEG
    1488, SNEG
    1489, SNEG
    1490, SNEG
    7391, SNEG
    7392, SNEG
    7393, SNEG
    7394, SNEG
*SURFACE, TYPE=ELEMENT, NAME=S_STRAP_TOROID2B_FWD
   10474, SPOS
   10475, SPOS
   10476, SPOS
   10477, SPOS
   11442, SPOS
   11443, SPOS
   11444, SPOS
   11445, SPOS
   11446, SPOS
   11448, SPOS
**
*CONTACT PAIR, INTERACTION=STRAP_TOROID2B_FWD
S_STRAP_TOROID2B_FWD, M_STRAP_TOROID2B_FWD
*SURFACE INTERACTION, NAME=STRAP_TOROID2B_FWD
*FRICTION
0.2,
**
** STRAP_TOROID3a_AFT
**
*SURFACE, TYPE=ELEMENT, NAME=M_STRAP_TOROID3A_AFT
     213, SNEG
     215, SNEG
     233, SNEG
     234, SNEG
     235, SNEG
     236, SNEG
     237, SNEG
     238, SNEG
     239, SNEG
     240, SNEG
*SURFACE, TYPE=ELEMENT, NAME=S_STRAP_TOROID3A_AFT
   10332, SPOS
   10333, SPOS
   11466, SPOS
   11467, SPOS
   11468, SPOS
   11469, SPOS
   11470, SPOS
   11471, SPOS
**
*CONTACT PAIR, INTERACTION=STRAP_TOROID3A_AFT
S_STRAP_TOROID3A_AFT, M_STRAP_TOROID3A_AFT
*SURFACE INTERACTION, NAME=STRAP_TOROID3A_AFT
*FRICTION
0.2,
**
** STRAP_TOROID3a_FWD
**
*SURFACE, TYPE=ELEMENT, NAME=M_STRAP_TOROID3A_FWD
     289, SNEG
     290, SNEG
     291, SNEG
     292, SNEG
     302, SNEG
     304, SNEG
     313, SNEG
     314, SNEG
     315, SNEG
     316, SNEG
*SURFACE, TYPE=ELEMENT, NAME=S_STRAP_TOROID3A_FWD
   10682, SPOS
   10683, SPOS
   11474, SPOS
   11475, SPOS
   11476, SPOS
   11477, SPOS
   11478, SPOS
   11480, SPOS
**
*CONTACT PAIR, INTERACTION=STRAP_TOROID3A_FWD
S_STRAP_TOROID3A_FWD, M_STRAP_TOROID3A_FWD
*SURFACE INTERACTION, NAME=STRAP_TOROID3A_FWD
*FRICTION
0.2,
**
** STRAP_TOROID3b_AFT
**
*SURFACE, TYPE=ELEMENT, NAME=M_STRAP_TOROID3B_AFT
    1690, SNEG
    1691, SNEG
    1692, SNEG
    1693, SNEG
    1714, SNEG
    1715, SNEG
    1716, SNEG
    1717, SNEG
    1895, SNEG
    1897, SNEG
*SURFACE, TYPE=ELEMENT, NAME=S_STRAP_TOROID3B_AFT
   10600, SPOS
   10601, SPOS
   11450, SPOS
   11452, SPOS
   11454, SPOS
   11455, SPOS
   11456, SPOS
   11457, SPOS
**
*CONTACT PAIR, INTERACTION=STRAP_TOROID3B_AFT
S_STRAP_TOROID3B_AFT, M_STRAP_TOROID3B_AFT
*SURFACE INTERACTION, NAME=STRAP_TOROID3B_AFT
*FRICTION
0.2,
**
** STRAP_TOROID3b_FWD
**
*SURFACE, TYPE=ELEMENT, NAME=M_STRAP_TOROID3B_FWD
    1975, SNEG
    1977, SNEG
    1978, SNEG
    1979, SNEG
    1980, SNEG
    1981, SNEG
    2002, SNEG
    2003, SNEG
    2004, SNEG
    2005, SNEG
*SURFACE, TYPE=ELEMENT, NAME=S_STRAP_TOROID3B_FWD
   10502, SPOS
   10503, SPOS
   11460, SPOS
   11461, SPOS
   11462, SPOS
   11463, SPOS
   11464, SPOS
   11465, SPOS
**
*CONTACT PAIR, INTERACTION=STRAP_TOROID3B_FWD
S_STRAP_TOROID3B_FWD, M_STRAP_TOROID3B_FWD
*SURFACE INTERACTION, NAME=STRAP_TOROID3B_FWD
*FRICTION
0.2,
**
** STRAP_TOROID4a_AFT
**
*SURFACE, TYPE=ELEMENT, NAME=M_STRAP_TOROID4A_AFT
     361, SNEG
     362, SNEG
     363, SNEG
     364, SNEG
     365, SNEG
     366, SNEG
     367, SNEG
     368, SNEG
     369, SNEG
     370, SNEG
*SURFACE, TYPE=ELEMENT, NAME=S_STRAP_TOROID4A_AFT
   10359, SPOS
   10361, SPOS
   11618, SPOS
   11620, SPOS
   11622, SPOS
   11623, SPOS
   11624, SPOS
   11625, SPOS
**
*CONTACT PAIR, INTERACTION=STRAP_TOROID4A_AFT
S_STRAP_TOROID4A_AFT, M_STRAP_TOROID4A_AFT
*SURFACE INTERACTION, NAME=STRAP_TOROID4A_AFT
*FRICTION
0.2,
**
** STRAP_TOROID4a_FWD
**
*SURFACE, TYPE=ELEMENT, NAME=M_STRAP_TOROID4A_FWD
     329, SNEG
     330, SNEG
     331, SNEG
     332, SNEG
     415, SNEG
     416, SNEG
     417, SNEG
     418, SNEG
     419, SNEG
     420, SNEG
*SURFACE, TYPE=ELEMENT, NAME=S_STRAP_TOROID4A_FWD
   10362, SPOS
   10364, SPOS
   11627, SPOS
   11629, SPOS
   11630, SPOS
   11631, SPOS
   11632, SPOS
   11633, SPOS
**
*CONTACT PAIR, INTERACTION=STRAP_TOROID4A_FWD
S_STRAP_TOROID4A_FWD, M_STRAP_TOROID4A_FWD
*SURFACE INTERACTION, NAME=STRAP_TOROID4A_FWD
*FRICTION
0.2,
**
** STRAP_TOROID4b_AFT
**
*SURFACE, TYPE=ELEMENT, NAME=M_STRAP_TOROID4B_AFT
    2188, SNEG
    2189, SNEG
    2218, SNEG
    2219, SNEG
    2220, SNEG
    2221, SNEG
    2250, SNEG
    2251, SNEG
    2252, SNEG
    2253, SNEG
*SURFACE, TYPE=ELEMENT, NAME=S_STRAP_TOROID4B_AFT
   10574, SPOS
   10575, SPOS
   11530, SPOS
   11531, SPOS
   11532, SPOS
   11533, SPOS
   11534, SPOS
   11536, SPOS
**
*CONTACT PAIR, INTERACTION=STRAP_TOROID4B_AFT
S_STRAP_TOROID4B_AFT, M_STRAP_TOROID4B_AFT
*SURFACE INTERACTION, NAME=STRAP_TOROID4B_AFT
*FRICTION
0.2,
**
** STRAP_TOROID4b_FWD
**
*SURFACE, TYPE=ELEMENT, NAME=M_STRAP_TOROID4B_FWD
    2016, SNEG
    2017, SNEG
    2018, SNEG
    2019, SNEG
    2020, SNEG
    2021, SNEG
    2550, SNEG
    2551, SNEG
    2552, SNEG
    2553, SNEG
*SURFACE, TYPE=ELEMENT, NAME=S_STRAP_TOROID4B_FWD
   10528, SPOS
   10529, SPOS
   11540, SPOS
   11541, SPOS
   11542, SPOS
   11543, SPOS
   11544, SPOS
   11545, SPOS
**
*CONTACT PAIR, INTERACTION=STRAP_TOROID4B_FWD
S_STRAP_TOROID4B_FWD, M_STRAP_TOROID4B_FWD
*SURFACE INTERACTION, NAME=STRAP_TOROID4B_FWD
*FRICTION
0.2,
**
** STRAP_TOROID5a_AFT
**
*SURFACE, TYPE=ELEMENT, NAME=M_STRAP_TOROID5A_AFT
     465, SNEG
     466, SNEG
     467, SNEG
     468, SNEG
     469, SNEG
     470, SNEG
     471, SNEG
     472, SNEG
    9863, SNEG
    9865, SNEG
*SURFACE, TYPE=ELEMENT, NAME=S_STRAP_TOROID5A_AFT
   10334, SPOS
   10336, SPOS
   11482, SPOS
   11483, SPOS
   11484, SPOS
   11485, SPOS
   11487, SPOS
   11489, SPOS
**
*CONTACT PAIR, INTERACTION=STRAP_TOROID5A_AFT
S_STRAP_TOROID5A_AFT, M_STRAP_TOROID5A_AFT
*SURFACE INTERACTION, NAME=STRAP_TOROID5A_AFT
*FRICTION
0.2,
**
** STRAP_TOROID5a_FWD
**
*SURFACE, TYPE=ELEMENT, NAME=M_STRAP_TOROID5A_FWD
     421, SNEG
     422, SNEG
     423, SNEG
     424, SNEG
     434, SNEG
     436, SNEG
     521, SNEG
     522, SNEG
     523, SNEG
     524, SNEG
*SURFACE, TYPE=ELEMENT, NAME=S_STRAP_TOROID5A_FWD
   10387, SPOS
   10389, SPOS
   11490, SPOS
   11491, SPOS
   11492, SPOS
   11493, SPOS
   11494, SPOS
   11496, SPOS
**
*CONTACT PAIR, INTERACTION=STRAP_TOROID5A_FWD
S_STRAP_TOROID5A_FWD, M_STRAP_TOROID5A_FWD
*SURFACE INTERACTION, NAME=STRAP_TOROID5A_FWD
*FRICTION
0.2,
**
** STRAP_TOROID5b_FWD
**
*SURFACE, TYPE=ELEMENT, NAME=M_STRAP_TOROID5B_FWD
    2554, SNEG
    2555, SNEG
    2556, SNEG
    2557, SNEG
    4503, SNEG
    4505, SNEG
    4506, SNEG
    4507, SNEG
    4508, SNEG
    4509, SNEG
*SURFACE, TYPE=ELEMENT, NAME=S_STRAP_TOROID5B_FWD
   10530, SPOS
   10531, SPOS
   11546, SPOS
   11547, SPOS
   11548, SPOS
   11549, SPOS
   11550, SPOS
   11552, SPOS
**
*CONTACT PAIR, INTERACTION=STRAP_TOROID5B_FWD
S_STRAP_TOROID5B_FWD, M_STRAP_TOROID5B_FWD
*SURFACE INTERACTION, NAME=STRAP_TOROID5B_FWD
*FRICTION
0.2,
**
** STRAP_TOROID6a_AFT
**
*SURFACE, TYPE=ELEMENT, NAME=M_STRAP_TOROID6A_AFT
     609, SNEG
     610, SNEG
     621, SNEG
     622, SNEG
     623, SNEG
     624, SNEG
     625, SNEG
     626, SNEG
     627, SNEG
     628, SNEG
*SURFACE, TYPE=ELEMENT, NAME=S_STRAP_TOROID6A_AFT
   10447, SPOS
   10449, SPOS
   11498, SPOS
   11499, SPOS
   11500, SPOS
   11501, SPOS
   11502, SPOS
   11504, SPOS
**
*CONTACT PAIR, INTERACTION=STRAP_TOROID6A_AFT
S_STRAP_TOROID6A_AFT, M_STRAP_TOROID6A_AFT
*SURFACE INTERACTION, NAME=STRAP_TOROID6A_AFT
*FRICTION
0.2,
**
** STRAP_TOROID6b_FWD
**
*SURFACE, TYPE=ELEMENT, NAME=M_STRAP_TOROID6B_FWD
    4520, SNEG
    4521, SNEG
    4522, SNEG
    4523, SNEG
    4524, SNEG
    4525, SNEG
    4534, SNEG
    4535, SNEG
    4536, SNEG
    4537, SNEG
*SURFACE, TYPE=ELEMENT, NAME=S_STRAP_TOROID6B_FWD
   10556, SPOS
   10557, SPOS
   11564, SPOS
   11565, SPOS
   11566, SPOS
   11567, SPOS
   11568, SPOS
   11569, SPOS
**
*CONTACT PAIR, INTERACTION=STRAP_TOROID6B_FWD
S_STRAP_TOROID6B_FWD, M_STRAP_TOROID6B_FWD
*SURFACE INTERACTION, NAME=STRAP_TOROID6B_FWD
*FRICTION
0.2,
**
** STRAP_TOROID7b_FWD
**
*SURFACE, TYPE=ELEMENT, NAME=M_STRAP_TOROID7B_FWD
    5991, SNEG
    5992, SNEG
    5993, SNEG
    5994, SNEG
    6055, SNEG
    6056, SNEG
    6057, SNEG
    6058, SNEG
    6324, SNEG
    6325, SNEG
*SURFACE, TYPE=ELEMENT, NAME=S_STRAP_TOROID7B_FWD
   10571, SPOS
   10573, SPOS
   11586, SPOS
   11587, SPOS
   11588, SPOS
   11589, SPOS
   11590, SPOS
   11592, SPOS
**
*CONTACT PAIR, INTERACTION=STRAP_TOROID7B_FWD
S_STRAP_TOROID7B_FWD, M_STRAP_TOROID7B_FWD
*SURFACE INTERACTION, NAME=STRAP_TOROID7B_FWD
*FRICTION
0.2,
**
** STRAP_TOROID8b_FWD
**
*SURFACE, TYPE=ELEMENT, NAME=M_STRAP_TOROID8B_FWD
     972, SNEG
     973, SNEG
     974, SNEG
     975, SNEG
    5711, SNEG
    5712, SNEG
    5713, SNEG
    5714, SNEG
*SURFACE, TYPE=ELEMENT, NAME=S_STRAP_TOROID8B_FWD
   11595, SPOS
   11597, SPOS
   11598, SPOS
   11599, SPOS
   11600, SPOS
   11601, SPOS
**
*CONTACT PAIR, INTERACTION=STRAP_TOROID8B_FWD
S_STRAP_TOROID8B_FWD, M_STRAP_TOROID8B_FWD
*SURFACE INTERACTION, NAME=STRAP_TOROID8B_FWD
*FRICTION
0.2,
**
** STRAP_TOROID_5b_AFT
**
*SURFACE, TYPE=ELEMENT, NAME=M_STRAP_TOROID_5B_AFT
    4107, SNEG
    4108, SNEG
    4109, SNEG
    4110, SNEG
    4151, SNEG
    4152, SNEG
    4153, SNEG
    4154, SNEG
    4386, SNEG
    4387, SNEG
    4388, SNEG
    4389, SNEG
*SURFACE, TYPE=ELEMENT, NAME=S_STRAP_TOROID_5B_AFT
   12482, SPOS
   12483, SPOS
   12484, SPOS
   12485, SPOS
   12486, SPOS
   12488, SPOS
   12490, SPOS
   12491, SPOS
   12492, SPOS
   12493, SPOS
**
*CONTACT PAIR, INTERACTION=STRAP_TOROID_5B_AFT
S_STRAP_TOROID_5B_AFT, M_STRAP_TOROID_5B_AFT
*SURFACE INTERACTION, NAME=STRAP_TOROID_5B_AFT
*FRICTION
0.2,
**
** STRAP_TOROID_6b_AFT
**
*SURFACE, TYPE=ELEMENT, NAME=M_STRAP_TOROID_6B_AFT
    4789, SNEG
    4790, SNEG
    4791, SNEG
    4792, SNEG
    5203, SNEG
    5204, SNEG
    5205, SNEG
    5206, SNEG
    5255, SNEG
    5256, SNEG
    5257, SNEG
    5258, SNEG
*SURFACE, TYPE=ELEMENT, NAME=S_STRAP_TOROID_6B_AFT
   12458, SPOS
   12459, SPOS
   12460, SPOS
   12461, SPOS
   12494, SPOS
   12495, SPOS
   12496, SPOS
   12497, SPOS
   12498, SPOS
   12500, SPOS
**
*CONTACT PAIR, INTERACTION=STRAP_TOROID_6B_AFT
S_STRAP_TOROID_6B_AFT, M_STRAP_TOROID_6B_AFT
*SURFACE INTERACTION, NAME=STRAP_TOROID_6B_AFT
*FRICTION
0.2,
**
** STRAP_TOROID_7b_AFT
**
*SURFACE, TYPE=ELEMENT, NAME=M_STRAP_TOROID_7B_AFT
    5563, SNEG
    5564, SNEG
    5565, SNEG
    5566, SNEG
    5567, SNEG
    5568, SNEG
    5569, SNEG
    5570, SNEG
    6594, SNEG
    6596, SNEG
*SURFACE, TYPE=ELEMENT, NAME=S_STRAP_TOROID_7B_AFT
   10680, SPOS
   10681, SPOS
   11579, SPOS
   11581, SPOS
   11582, SPOS
   11583, SPOS
   11584, SPOS
   11585, SPOS
**
*CONTACT PAIR, INTERACTION=STRAP_TOROID_7B_AFT
S_STRAP_TOROID_7B_AFT, M_STRAP_TOROID_7B_AFT
*SURFACE INTERACTION, NAME=STRAP_TOROID_7B_AFT
*FRICTION
0.2,
**
** STRAP_TOROID_8b_AFT
**
*SURFACE, TYPE=ELEMENT, NAME=M_STRAP_TOROID_8B_AFT
    5639, SNEG
    5640, SNEG
    5641, SNEG
    5642, SNEG
    5927, SNEG
    5928, SNEG
    5929, SNEG
    5930, SNEG
*SURFACE, TYPE=ELEMENT, NAME=S_STRAP_TOROID_8B_AFT
   11602, SPOS
   11603, SPOS
   11604, SPOS
   11605, SPOS
   11608, SPOS
   11609, SPOS
**
*CONTACT PAIR, INTERACTION=STRAP_TOROID_8B_AFT
S_STRAP_TOROID_8B_AFT, M_STRAP_TOROID_8B_AFT
*SURFACE INTERACTION, NAME=STRAP_TOROID_8B_AFT
*FRICTION
0.2,
**
** STRAP_TOROID6a_FWD
**
*SURFACE, TYPE=ELEMENT, NAME=M_STRAP_TOROID6A_FWD
     537, SNEG
     538, SNEG
     539, SNEG
     540, SNEG
     549, SNEG
     550, SNEG
     551, SNEG
     552, SNEG
     591, SNEG
     592, SNEG
     593, SNEG
     594, SNEG
     595, SNEG
     596, SNEG
*SURFACE, TYPE=ELEMENT, NAME=S_STRAP_TOROID6A_FWD
   10390, SPOS
   10391, SPOS
   10392, SPOS
   10393, SPOS
   10394, SPOS
   10396, SPOS
   11514, SPOS
   11515, SPOS
   11516, SPOS
   11517, SPOS
   11520, SPOS
   11521, SPOS
**
*CONTACT PAIR, INTERACTION=STRAP_TOROID6A_FWD
S_STRAP_TOROID6A_FWD, M_STRAP_TOROID6A_FWD
*SURFACE INTERACTION, NAME=STRAP_TOROID6A_FWD
*FRICTION
0.2,
**
** STRAP_TOROID7a_FWD
**
*SURFACE, TYPE=ELEMENT, NAME=M_STRAP_TOROID7A_FWD
     645, SNEG
     646, SNEG
     647, SNEG
     648, SNEG
     681, SNEG
     682, SNEG
    9567, SNEG
    9568, SNEG
    9569, SNEG
    9570, SNEG
*SURFACE, TYPE=ELEMENT, NAME=S_STRAP_TOROID7A_FWD
   10411, SPOS
   10413, SPOS
   10414, SPOS
   10415, SPOS
   10416, SPOS
   10417, SPOS
   11522, SPOS
   11523, SPOS
   11524, SPOS
   11525, SPOS
   11526, SPOS
   11528, SPOS
**
*CONTACT PAIR, INTERACTION=STRAP_TOROID7A_FWD
S_STRAP_TOROID7A_FWD, M_STRAP_TOROID7A_FWD
*SURFACE INTERACTION, NAME=STRAP_TOROID7A_FWD
*FRICTION
0.2,
**
** STRAP_TOROID1b_FWD
**
*SURFACE, TYPE=ELEMENT, NAME=M_STRAP_TOROID1B_FWD
     728, SNEG
     729, SNEG
     730, SNEG
     731, SNEG
     788, SNEG
     789, SNEG
     790, SNEG
     791, SNEG
     800, SNEG
     801, SNEG
     802, SNEG
     803, SNEG
*SURFACE, TYPE=ELEMENT, NAME=S_STRAP_TOROID1B_FWD
   10498, SPOS
   10499, SPOS
   10500, SPOS
   10501, SPOS
   11610, SPOS
   11611, SPOS
   11612, SPOS
   11613, SPOS
   11614, SPOS
   11616, SPOS
**
*CONTACT PAIR, INTERACTION=STRAP_TOROID1B_FWD
S_STRAP_TOROID1B_FWD, M_STRAP_TOROID1B_FWD
*SURFACE INTERACTION, NAME=STRAP_TOROID1B_FWD
*FRICTION
0.2,
**
** STRAP_TOROID7a_AFT
**
*SURFACE, TYPE=ELEMENT, NAME=M_STRAP_TOROID7A_AFT
     633, SNEG
     634, SNEG
     635, SNEG
     636, SNEG
     649, SNEG
     650, SNEG
     651, SNEG
     652, SNEG
     693, SNEG
     694, SNEG
     695, SNEG
     696, SNEG
*SURFACE, TYPE=ELEMENT, NAME=S_STRAP_TOROID7A_AFT
   10418, SPOS
   10419, SPOS
   10420, SPOS
   10421, SPOS
   11507, SPOS
   11509, SPOS
   11510, SPOS
   11511, SPOS
   11512, SPOS
   11513, SPOS
**
*CONTACT PAIR, INTERACTION=STRAP_TOROID7A_AFT
S_STRAP_TOROID7A_AFT, M_STRAP_TOROID7A_AFT
*SURFACE INTERACTION, NAME=STRAP_TOROID7A_AFT
*FRICTION
0.2,
**
** elset ALL_MASSIVE_ELEMENTS contains all 12457 elements that can have mass
*ELSET, ELSET=ALL_MASSIVE_ELEMENTS
ALL_SHELL_ANISO,
ALL_SHELL_ISO,
ALL_B31_BARL,
** ---------------------------------------------------
*NSET, NSET=Shoulder
7603,
** ---------------------------------------------------
*ELSET, ELSET=SF_Chev
11949, 11951, 11953, 11955
**
*ELSET, ELSET=SF_Loop_Aft_Aside
** T2/T3         T4/T5         T6/T7         CB/T1
10318, 10319, 10347, 10349, 10434, 10436, 10299, 10301
**
*ELSET, ELSET=SF_Loop_Aft_Bside
** T1/T2         T3/T4         T5/T6
10462, 10464, 10588, 10589, 12472, 12473
**
*ELSET, ELSET=SF_Loop_Fwd_Aside
** T4/T5         T6/T7         T2/T3         CB/T1
10374, 10376, 10402, 10404, 10696, 10697, 10710, 10712
**
*ELSET, ELSET=SF_Loop_Fwd_Bside
** T1/T2         T3/T4         T5/T6
10487, 10489, 10514, 10515, 10542, 10543
**
*ELSET, ELSET=SF_Radial
11710, 11711
*ELSET, ELSET=SF_Cords_AFT
**12076, 12092, 12128, 12164, 12208, 12232, 12256, 12308, 12370
** No Tri-torus
12076, 12092, 12128, 12164, 12208, 12308, 12370, 12404
*ELSET, ELSET=SF_Cords_FWD
**12084, 12102, 12115, 12146, 12184, 12279, 12338, 12404, 12440
** No Tri-torus
12084, 12102, 12115, 12146, 12184, 12279, 12338, 12440
** ---------------------------------------------------
**ELSET, ELSET=ALL_STRAPS
**SF_Chev,
**SF_Loop_Aft_Aside,
**SF_Loop_Aft_Bside,
**SF_Loop_Fwd_Aside,
**SF_Loop_Fwd_Bside,
**SF_Radial,
***----------------------------------------
**TIME POINTS, NAME=Times
**   0.0, 0.219, 0.357, 0.454, 0.53, 1.0
**
*STEP, INC=100, NLGEOM, NAME=Inflation
**DYNAMIC, APPLICATION=QUASI-STATIC
*STATIC
0.01, 1.0,,
*OUTPUT, FIELD
*NODE OUTPUT
U,
*ELEMENT OUTPUT
SF,
E,
NE,
LE,
*MONITOR, DOF=3, NODE=7603
*NODE PRINT, NSET=Shoulder, SUMMARY=NO
U1,U3,
*NODE PRINT, SUMMARY=NO, TOTALS=YES, GLOBAL=YES, FREQUENCY=999
RF3,
**
** output request from "SPCFORCES(SORT1,PLOT)=ALL"
*OUTPUT, FIELD
*NODE OUTPUT
RF,
*EL PRINT, ELSET=SF_Chev,FREQUENCY=999,POSITION=CENTROIDAL, SUMMARY=NO
SF2,
*EL PRINT, ELSET=SF_Loop_Aft_Aside,FREQUENCY=999,POSITION=CENTROIDAL, SUMMARY=NO
SF2,
*EL PRINT, ELSET=SF_Loop_Aft_Bside,FREQUENCY=999,POSITION=CENTROIDAL, SUMMARY=NO
SF2,
*EL PRINT, ELSET=SF_Loop_Fwd_Aside,FREQUENCY=999,POSITION=CENTROIDAL, SUMMARY=NO
SF2,
*EL PRINT, ELSET=SF_Loop_Fwd_Bside,FREQUENCY=999,POSITION=CENTROIDAL, SUMMARY=NO
SF2,
*EL PRINT, ELSET=SF_Radial,FREQUENCY=999,POSITION=CENTROIDAL, SUMMARY=NO
SF2,
*EL PRINT, ELSET=SF_Cords_AFT,FREQUENCY=999,POSITION=CENTROIDAL, SUMMARY=NO
SF1,
E,
NE,
LE,
*EL PRINT, ELSET=SF_Cords_FWD,FREQUENCY=999,POSITION=CENTROIDAL, SUMMARY=NO
SF1,
E,
NE,
LE,
**OUTPUT, FIELD
***ELEMENT OUTPUT
**SF,
***ELEMENT OUTPUT, POS=NODES, ELSET=ALL_SHELL_ISO
**         2,         3,         4,
**NFORC,
**CONTACT OUTPUT, VARIABLE=ALL
*BOUNDARY, OP=NEW
** add cord shunt nodes
  12158, 1,6, 0.
  12161, 2,2, 0.
  12161, 4,4, 0.
  12161, 6,6, 0.
** from SPCADD set 2 and SPC set 6
    2606, 1,2, 0.
    2606, 4,4, 0.
    2606, 6,6, 0.
    2607, 1,2, 0.
    2607, 4,4, 0.
    2607, 6,6, 0.
    2612, 1,2, 0.
    2612, 4,4, 0.
    2612, 6,6, 0.
    2617, 1,2, 0.
    2617, 4,4, 0.
    2617, 6,6, 0.
    2621, 1,2, 0.
    2621, 4,4, 0.
    2621, 6,6, 0.
    2622, 1,2, 0.
    2622, 4,4, 0.
    2622, 6,6, 0.
    2630, 1,2, 0.
    2630, 4,4, 0.
    2630, 6,6, 0.
    2633, 1,2, 0.
    2633, 4,4, 0.
    2633, 6,6, 0.
   10532, 1,2, 0.
   10532, 4,4, 0.
   10532, 6,6, 0.
   10536, 1,2, 0.
   10536, 4,4, 0.
   10536, 6,6, 0.
   10547, 1,2, 0.
   10547, 4,4, 0.
   10547, 6,6, 0.
   10550, 1,2, 0.
   10550, 4,4, 0.
   10550, 6,6, 0.
   10561, 1,2, 0.
   10561, 4,4, 0.
   10561, 6,6, 0.
   10565, 1,2, 0.
   10565, 4,4, 0.
   10565, 6,6, 0.
   10574, 1,2, 0.
   10574, 4,4, 0.
   10574, 6,6, 0.
   10577, 1,2, 0.
   10577, 4,4, 0.
   10577, 6,6, 0.
*BOUNDARY, OP=NEW
** from SPCADD set 2 and SPC set 8
     173, 1,1, 0.
    2611, 1,1, 0.
    2619, 1,1, 0.
    2625, 1,1, 0.
   10516, 1,1, 0.
   10533, 1,1, 0.
   10534, 1,1, 0.
   10535, 1,1, 0.
   10537, 1,1, 0.
   10538, 1,1, 0.
   10539, 1,1, 0.
   10546, 1,1, 0.
   10548, 1,1, 0.
   10549, 1,1, 0.
   10551, 1,1, 0.
   10558, 1,1, 0.
   10559, 1,1, 0.
   10560, 1,1, 0.
   10562, 1,1, 0.
   10563, 1,1, 0.
   10564, 1,1, 0.
   10575, 1,1, 0.
   10576, 1,1, 0.
   10578, 1,1, 0.
*BOUNDARY, OP=NEW
** from SPCADD set 2 and SPC set 9
      10, 1,6, 0.
      11, 1,6, 0.
      12, 1,6, 0.
      13, 1,6, 0.
      14, 1,6, 0.
      15, 1,6, 0.
    2605, 1,6, 0.
    2613, 1,6, 0.
    2614, 1,6, 0.
    2620, 1,6, 0.
    2631, 1,6, 0.
    2632, 1,6, 0.
    2691, 1,6, 0.
    2692, 1,6, 0.
    2817, 1,6, 0.
    2818, 1,6, 0.
    3144, 1,6, 0.
    3145, 1,6, 0.
    3187, 1,6, 0.
    3188, 1,6, 0.
    3189, 1,6, 0.
    3190, 1,6, 0.
    3191, 1,6, 0.
    3192, 1,6, 0.
    3193, 1,6, 0.
    3194, 1,6, 0.
    3195, 1,6, 0.
    3196, 1,6, 0.
    3197, 1,6, 0.
    3198, 1,6, 0.
    3199, 1,6, 0.
    3200, 1,6, 0.
    3201, 1,6, 0.
    3202, 1,6, 0.
    3203, 1,6, 0.
    3204, 1,6, 0.
    3205, 1,6, 0.
    3206, 1,6, 0.
    3207, 1,6, 0.
    3208, 1,6, 0.
    3209, 1,6, 0.
   11049, 1,6, 0.
   11718, 1,6, 0.
   11762, 1,6, 0.
*BOUNDARY, OP=NEW
** from SPCADD set 2 and SPC set 10
       1, 2,2, 0.
       1, 4,4, 0.
       1, 6,6, 0.
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   12154, 6,6, 0.
*DLOAD, OP=NEW
** from LOAD set 2 and PLOADi set 3
** overall scale factor = 1.
** scale factor for this PLOADi set = 1.
       1, P, -12.
       2, P, -12.
       3, P, -12.
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   10297, P, -12.
*END STEP
** ---------------------------------------------------
*STEP, INC=500, NLGEOM, NAME=Case1_Infl+Aero
*DYNAMIC, APPLICATION=QUASI-STATIC
0.01, 1.0,, 0.05
**OUTPUT, FIELD, TIME MARKS=YES, TIME POINTS=Times
*OUTPUT, FIELD, FREQUENCY=1
*NODE OUTPUT
U,
RF,
*ELEMENT OUTPUT
SF,
E,
NE,
LE,
*MONITOR, DOF=3, NODE=7603
*NODE PRINT, NSET=Shoulder, SUMMARY=NO
U1,U3,
*NODE PRINT, SUMMARY=NO, TOTALS=YES, GLOBAL=YES, FREQUENCY=1
RF3,
**
*EL PRINT, ELSET=SF_Chev,FREQUENCY=1,POSITION=CENTROIDAL, SUMMARY=NO
SF2,
*EL PRINT, ELSET=SF_Loop_Aft_Aside,FREQUENCY=1,POSITION=CENTROIDAL, SUMMARY=NO
SF2,
*EL PRINT, ELSET=SF_Loop_Aft_Bside,FREQUENCY=1,POSITION=CENTROIDAL, SUMMARY=NO
SF2,
*EL PRINT, ELSET=SF_Loop_Fwd_Aside,FREQUENCY=1,POSITION=CENTROIDAL, SUMMARY=NO
SF2,
*EL PRINT, ELSET=SF_Loop_Fwd_Bside,FREQUENCY=1,POSITION=CENTROIDAL, SUMMARY=NO
SF2,
*EL PRINT, ELSET=SF_Radial,FREQUENCY=1,POSITION=CENTROIDAL, SUMMARY=NO
SF2,
*EL PRINT, ELSET=SF_Cords_AFT,FREQUENCY=1,POSITION=CENTROIDAL, SUMMARY=NO
SF1,
E,
LE,
*EL PRINT, ELSET=SF_Cords_FWD,FREQUENCY=1,POSITION=CENTROIDAL, SUMMARY=NO
SF1,
E,
LE,
**OUTPUT, FIELD
***ELEMENT OUTPUT
**SF,
***ELEMENT OUTPUT, POS=NODES, ELSET=ALL_SHELL_ISO
**         2,         3,         4,
**NFORC,
**CONTACT OUTPUT, VARIABLE=ALL
*BOUNDARY, OP=NEW
** add cord shunt nodes
  12158, 1,6, 0.
  12161, 2,2, 0.
  12161, 4,4, 0.
  12161, 6,6, 0.
** from SPCADD set 2 and SPC set 6
    2606, 1,2, 0.
    2606, 4,4, 0.
    2606, 6,6, 0.
    2607, 1,2, 0.
    2607, 4,4, 0.
    2607, 6,6, 0.
    2612, 1,2, 0.
    2612, 4,4, 0.
    2612, 6,6, 0.
    2617, 1,2, 0.
    2617, 4,4, 0.
    2617, 6,6, 0.
    2621, 1,2, 0.
    2621, 4,4, 0.
    2621, 6,6, 0.
    2622, 1,2, 0.
    2622, 4,4, 0.
    2622, 6,6, 0.
    2630, 1,2, 0.
    2630, 4,4, 0.
    2630, 6,6, 0.
    2633, 1,2, 0.
    2633, 4,4, 0.
    2633, 6,6, 0.
   10532, 1,2, 0.
   10532, 4,4, 0.
   10532, 6,6, 0.
   10536, 1,2, 0.
   10536, 4,4, 0.
   10536, 6,6, 0.
   10547, 1,2, 0.
   10547, 4,4, 0.
   10547, 6,6, 0.
   10550, 1,2, 0.
   10550, 4,4, 0.
   10550, 6,6, 0.
   10561, 1,2, 0.
   10561, 4,4, 0.
   10561, 6,6, 0.
   10565, 1,2, 0.
   10565, 4,4, 0.
   10565, 6,6, 0.
   10574, 1,2, 0.
   10574, 4,4, 0.
   10574, 6,6, 0.
   10577, 1,2, 0.
   10577, 4,4, 0.
   10577, 6,6, 0.
*BOUNDARY, OP=NEW
** from SPCADD set 2 and SPC set 8
     173, 1,1, 0.
    2611, 1,1, 0.
    2619, 1,1, 0.
    2625, 1,1, 0.
   10516, 1,1, 0.
   10533, 1,1, 0.
   10534, 1,1, 0.
   10535, 1,1, 0.
   10537, 1,1, 0.
   10538, 1,1, 0.
   10539, 1,1, 0.
   10546, 1,1, 0.
   10548, 1,1, 0.
   10549, 1,1, 0.
   10551, 1,1, 0.
   10558, 1,1, 0.
   10559, 1,1, 0.
   10560, 1,1, 0.
   10562, 1,1, 0.
   10563, 1,1, 0.
   10564, 1,1, 0.
   10575, 1,1, 0.
   10576, 1,1, 0.
   10578, 1,1, 0.
*BOUNDARY, OP=NEW
** from SPCADD set 2 and SPC set 9
      10, 1,6, 0.
      11, 1,6, 0.
      12, 1,6, 0.
      13, 1,6, 0.
      14, 1,6, 0.
      15, 1,6, 0.
    2605, 1,6, 0.
    2613, 1,6, 0.
    2614, 1,6, 0.
    2620, 1,6, 0.
    2631, 1,6, 0.
    2632, 1,6, 0.
    2691, 1,6, 0.
    2692, 1,6, 0.
    2817, 1,6, 0.
    2818, 1,6, 0.
    3144, 1,6, 0.
    3145, 1,6, 0.
    3187, 1,6, 0.
    3188, 1,6, 0.
    3189, 1,6, 0.
    3190, 1,6, 0.
    3191, 1,6, 0.
    3192, 1,6, 0.
    3193, 1,6, 0.
    3194, 1,6, 0.
    3195, 1,6, 0.
    3196, 1,6, 0.
    3197, 1,6, 0.
    3198, 1,6, 0.
    3199, 1,6, 0.
    3200, 1,6, 0.
    3201, 1,6, 0.
    3202, 1,6, 0.
    3203, 1,6, 0.
    3204, 1,6, 0.
    3205, 1,6, 0.
    3206, 1,6, 0.
    3207, 1,6, 0.
    3208, 1,6, 0.
    3209, 1,6, 0.
   11049, 1,6, 0.
   11718, 1,6, 0.
   11762, 1,6, 0.
*BOUNDARY, OP=NEW
** from SPCADD set 2 and SPC set 10
       1, 2,2, 0.
       1, 4,4, 0.
       1, 6,6, 0.
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   12154, 6,6, 0.
*DLOAD, OP=NEW
** from LOAD set 4 and PLOADi set 3
** overall scale factor = 1.
** scale factor for this PLOADi set = 1.
       1, P, -12.
       2, P, -12.
       3, P, -12.
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   10297, P, -12.
*DLOAD, OP=NEW
** from LOAD set 4 and PLOADi set 5
** overall scale factor = 1.
** scale factor for this PLOADi set = 1.
       1, P, 1.
       2, P, 1.
       3, P, 1.
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   10297, P, 1.
*END STEP
